*Heading
** Job name: Job-1 Model name: Model-1
** Generated by: Abaqus/CAE 2018
*Preprint, echo=NO, model=NO, history=NO, contact=NO
**
** PARTS
**
*Part, name=Part-1
*Node
      1,           0., 0.00241538463
      2,           0., 0.00483076926
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*Element, type=CPS3
 1,  861,  787,  833
 2, 1417, 1101, 1082
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*Element, type=CPS4
  47,  556,  634,  416,  410
  48,  813,  570,  476,  474
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*Nset, nset=d1
  55,  56,  57,  58,  59, 362, 363, 364, 365
*Elset, elset=d1
  62,  63,  64,  65, 238, 587, 592, 755
*Nset, nset=d2
  46,  47, 356, 357
*Elset, elset=d2
 192, 200, 582
*Nset, nset=fixed
   1,   2,   3,   4,   5,   6
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*Elset, elset=fixed
  83,  84,  90,  91,  92,  93
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*Nset, nset=Set-4, generate
    1,  1422,     1
*Elset, elset=Set-4, generate
    1,  1357,     1
*Nset, nset=contact_pressure
   7,  41,  42,  43,  44,  45
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*Elset, elset=contact_pressure
  51,  62,  63,  64,  65,  72
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*Elset, elset=_Surf-1_S4, internal
  72,  78, 199, 211, 236, 248
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*Elset, elset=_Surf-1_S2, internal
  51,  73,  74, 192, 200, 205
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*Elset, elset=_Surf-1_S3, internal
  62,  64,  65, 116, 185, 216, 226, 229, 257, 287, 509, 587, 592, 626, 720, 755
*Elset, elset=_Surf-1_S1, internal
  63,  76, 117, 238, 245, 291, 565, 578, 645, 649
*Surface, type=ELEMENT, name=Surf-1
_Surf-1_S4, S4
_Surf-1_S2, S2
_Surf-1_S3, S3
_Surf-1_S1, S1
** Section: Section-1
*Solid Section, elset=Set-4, material=Mooney-Rivlin
,
*End Part
**
*Part, name=Part-3
*Node
      1, -0.0250000004, 0.0408999994
      2,      -0.0137, 0.0408999994
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*Element, type=R2D2
 1,  1,  2
 2,  2,  3
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*Node
     12, 0.0315000005, 0.0408999994,           0.
*Nset, nset=Part-3-RefPt_, internal
12,
*Nset, nset=top, generate
  1,  12,   1
*Elset, elset=top, generate
  1,  10,   1
*Elset, elset=Part-3, generate
  1,  10,   1
*End Part
**
**
** ASSEMBLY
**
*Assembly, name=Assembly
**
*Instance, name=Part-1-1, part=Part-1
*End Instance
**
*Instance, name=Part-3-1, part=Part-3
*End Instance
**
*Nset, nset=Set-2, instance=Part-3-1, generate
  1,  11,   1
*Elset, elset=Set-2, instance=Part-3-1, generate
  1,  10,   1
*Elset, elset=_CP-3-Part-1-1_S4, internal, instance=Part-1-1
  72,  78, 199, 211, 236, 248
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*Elset, elset=_CP-3-Part-1-1_S2, internal, instance=Part-1-1
  51,  73,  74, 192, 200, 205
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*Elset, elset=_CP-3-Part-1-1_S3, internal, instance=Part-1-1
  62,  64,  65, 116, 185, 216, 226, 229, 257, 287, 509, 587, 592, 626, 720, 755
*Elset, elset=_CP-3-Part-1-1_S1, internal, instance=Part-1-1
  63,  76, 117, 238, 245, 291, 565, 578, 645, 649
*Surface, type=ELEMENT, name=CP-3-Part-1-1
_CP-3-Part-1-1_S4, S4
_CP-3-Part-1-1_S2, S2
_CP-3-Part-1-1_S3, S3
_CP-3-Part-1-1_S1, S1
*Elset, elset=_Surf-5_SNEG, internal, instance=Part-3-1, generate
  1,  10,   1
*Surface, type=ELEMENT, name=Surf-5
_Surf-5_SNEG, SNEG
*Elset, elset=_s_Surf-1_S3, internal, instance=Part-1-1
  62,  64,  65,  83,  97,  99
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*Elset, elset=_s_Surf-1_S1, internal, instance=Part-1-1
  63,  76,  84,  90,  91,  92
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*Elset, elset=_s_Surf-1_S4, internal, instance=Part-1-1
  72,  78,  83, 107, 108, 199
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*Elset, elset=_s_Surf-1_S2, internal, instance=Part-1-1
  51,  73,  74, 109, 180, 187
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*Surface, type=ELEMENT, name=s_Surf-1
_s_Surf-1_S3, S3
_s_Surf-1_S1, S1
_s_Surf-1_S4, S4
_s_Surf-1_S2, S2
*Rigid Body, ref node=Part-3-1.Part-3-RefPt_, elset=Part-3-1.Part-3
*End Assembly
**
** MATERIALS
**
*Material, name=Mooney-Rivlin
*Hyperelastic, mooney-rivlin
 4.57693e+06,     553472., 1.95568e-09
**
** INTERACTION PROPERTIES
**
*Surface Interaction, name=IntProp-1
1.,
*Friction, slip tolerance=0.005
 0.05,
*Surface Interaction, name=IntProp-2
1.,
*Friction, slip tolerance=0.005
 0.05,
**
** CONTACT INITIALIZATION DATA
**
*Contact Initialization Data, name=CInit-1
**
** BOUNDARY CONDITIONS
**
** Name: BC-1 Type: Displacement/Rotation
*Boundary
Part-1-1.fixed, 1, 1
Part-1-1.fixed, 2, 2
**
** INTERACTIONS
**
** Interaction: Int-2
*Contact Pair, interaction=IntProp-1, type=SURFACE TO SURFACE, adjust=1e-05
s_Surf-1, Surf-5
** Interaction: self_contact
*Contact Pair, interaction=IntProp-1, type=SURFACE TO SURFACE, adjust=1e-05
s_Surf-1, s_Surf-1
** ----------------------------------------------------------------
**
** STEP: Step-1
**
*Step, name=Step-1, nlgeom=YES, inc=2000
*Static, direct
0.05, 1.,
**
** BOUNDARY CONDITIONS
**
** Name: BC-2 Type: Displacement/Rotation
*Boundary
Set-2, 1, 1
Set-2, 2, 2, -0.0126
**
** OUTPUT REQUESTS
**
*Restart, write, frequency=0
**
** FIELD OUTPUT: F-Output-1
**
*Output, field
*Node Output
CF, RF, U
*Element Output, directions=YES
HP, LE, MISES, P, PE, PEEQ, PEMAG, S
*Contact Output
CDISP, CSTRESS
**
** FIELD OUTPUT: F-Output-2
**
*Element Output, directions=YES
HP, MISES, P
*Contact Output
CSTRESS,
**
** HISTORY OUTPUT: H-Output-1
**
*Output, history, variable=PRESELECT
*End Step
